// SBML level 2 version 1

model Vilar2006_Skeleton()

  // Compartments:
  compartment Cell = 1;

  // Species:
  species $TGFb in Cell = 0.1;
  species R1 in Cell = 271.087;
  species R2 in Cell = 127.087;
  species LR1R2 in Cell = 1.691268;
  species $Synth in Cell = 1;
  species $Sink in Cell = 0;
  species LR1R2_I in Cell = 16.91268;

  // Parameters:
  Ka = 0.1;
  PR1 = 0.1;
  PR2 = 0.1;
  Kcd = 0.1;
  Ki = 0.1;

  // Reactions:
  v1: $Synth => R1; Cell*PR1*Synth;
  v2: R1 => $Sink; Cell*Kcd*R1;
  v3: $Synth => R2; Cell*PR2*Synth;
  v4: R2 => $Sink; Cell*Kcd*R2;
  v5: $TGFb + R1 + R2 => LR1R2; Cell*Ka*TGFb*R1*R2;
  v6: LR1R2 => LR1R2_I; Cell*Ki*LR1R2;
end
