// SBML level 2 version 4

model demo_vilar_4()

  // Compartments:
  compartment Cell = 1;

  // Species:
  species LR1R2_I in Cell = 16.91268;
  species $Sink in Cell = 0;
  species $Synth in Cell = 1;
  species LR1R2 in Cell = 1.691268;
  species R2_I in Cell = 1270.87;
  species $TGFb in Cell = 0.1;
  species R2 in Cell = 127.087;
  species R1_I in Cell = 2710.87;
  species R1 in Cell = 271.087;

  // Parameters:
  Kd = 0.1;
  Ka = 0.1;
  PR1 = 0.1;
  Ki = 0.1;
  Kr = 0.1;
  PR2 = 0.1;
  Kcd = 0.1;

  // Reactions:
  v1: $Synth => R2; Cell*PR2*Synth;
  v2: R2 => $Sink; Cell*Kcd*R2;
  v3: R1 => R1_I; Cell*Ki*R1;
  v4: $Synth => R1; Cell*PR1*Synth;
  v5: R1_I => R1; Cell*Kr*R1_I;
  v6: $TGFb + R1 + R2 => LR1R2; Cell*Ka*TGFb*R1*R2;
  v7: R2_I => R2; Cell*Kr*R2_I;
  v8: R2 => R2_I; Cell*Ki*R2;
  v9: LR1R2 => $TGFb + R1 + R2; Cell*Kd*LR1R2;
  v10: LR1R2 => LR1R2_I; Cell*Ki*LR1R2;
  v11: R1 => $Sink; Cell*Kcd*R1;
end
